*Heading
3D
** Job name: Job-1 Model name: Plate
** Generated by: Abaqus/CAE 6.12-3
*Preprint, echo=NO, model=NO, history=NO, contact=NO
**
** PARTS
**
**Part, name=Part-1
*Node,NSET=NALL
1,  0.0000000000000000,   0.0000000000000000,   0.0000000000000000
2,  0.0000000000000000,   0.4604300000000000,   0.0000000000000000
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*User element, nodes=8, type=U8, properties=3,coordinates=3, variables=7
1,2,3
*User element, nodes=10, type=U10, properties=3,coordinates=3, variables=7
1,2,3
*Element, type=U8,ELSET=eight
1,2,7,8,3,14,19,20,15
2,9,10,12,11,21,22,24,23
3,14,19,20,15,26,31,32,27
4,21,22,24,23,33,34,36,35
*UEL Property, ELSET=eight
1, 1.0000e+00,  0.30
*Element, type=U10,ELSET=ten
5,4,5,10,9,6,16,17,22,21,18
6,7,6,9,11,8,19,18,21,23,20
7,1,4,6,7,2,13,16,18,19,14
8,16,17,22,21,18,28,29,34,33,30
9,19,18,21,23,20,31,30,33,35,32
10,13,16,18,19,14,25,28,30,31,26
*UEL Property, ELSET=ten
1, 1.0000e+00,  0.30
*Nset, nset=Set-1
1,  36,1
*Elset, elset=Set-1, generate
1,10,1
*Step, name=Step-1,NLGEOM=YES
*Static
1., 1., 1., 1.
**
** BOUNDARY CONDITIONS
**
** Name: BC-1 Type: Displacement/Rotation
*Boundary
1,  1,, 0.1000000000000000
1,  2,, 0.0500000000000000
1,  3,, 0.0500000000000000
2,  1,, 0.1920860000000000
2,  2,, 0.0960430000000000
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36,  3,, 0.5500000000000000
** OUTPUT REQUESTS
**
*Restart, write, frequency=0
**
** FIELD OUTPUT: F-Output-1
**
*Output, field, variable=PRESELECT
**
** HISTORY OUTPUT: H-Output-1
**
*Output, history, variable=PRESELECT
*NODE PRINT, NSET=NALL
U1,U2,U3
*End Step
